# OpenSim document version 40600
Model LaiUhlrich2022_scaled:
  gravity: 0 -9.80665 0
  length_units: meters
  force_units: N
  credits:
    Rajagopal et al. (2016), Lai et al. (2017), Uhlrich et al. (2022)
  publications:
    Rajagopal, A., Dembia, C.L., DeMers, M.S., Delp, D.D., Hicks, J.L., Delp, S.L. (2016) Full-body musculoskeletal model for muscle-driven simulation of human gait. IEEE Transactions on Biomedical Engineering.
  Ground
  BodySet:
    Body pelvis: mass=15.63242 [kg] mass_center=(-0.09881015 0 0) inertia=(0.276389 0.276389 0.1501186 0 0 0)
        meshes=(r_pelvis.vtp l_pelvis.vtp sacrum.vtp)
      WrapCylinder Gmax1_at_pelvis_r: xyz_body_rotation=(-0.6 0.45 0) translation=(-0.107615 -0.1383622 0.08742037)
          quadrant=-x radius=0.05622493 length=0.2125991
      WrapCylinder Gmax2_at_pelvis_r: xyz_body_rotation=(-0.75 0.39 0) translation=(-0.1118078 -0.1160006 0.09745222)
          quadrant=all radius=0.05629185 length=0.1413977
      WrapCylinder Gmax3_at_pelvis_r: xyz_body_rotation=(-0.1 0 0) translation=(-0.1160006 -0.1229886 0.09745222)
          quadrant=all radius=0.05591107 length=0.1432771
      WrapCylinder Gmax1_at_pelvis_l: xyz_body_rotation=(0.6 -0.45 0) translation=(-0.107615 -0.1383622 -0.08742037)
          quadrant=-x radius=0.05622493 length=0.2125991
      WrapCylinder Gmax2_at_pelvis_l: xyz_body_rotation=(0.75 -0.39 0) translation=(-0.1118078 -0.1160006 -0.09745222)
          quadrant=all radius=0.05629185 length=0.1413977
      WrapCylinder Gmax3_at_pelvis_l: xyz_body_rotation=(0.1 0 0) translation=(-0.1160006 -0.1229886 -0.09745222)
          quadrant=all radius=0.05591107 length=0.1432771
      WrapCylinder PS_at_brim_r: xyz_body_rotation=(-0.25 -0.27 0.1) translation=(-0.1034222 -0.08385585 0.09401273)
          quadrant=-y radius=0.0699949 length=0.1428623
      WrapCylinder PS_at_brim_l: xyz_body_rotation=(0.25 0.27 0.1) translation=(-0.1034222 -0.08385585 -0.09401273)
          quadrant=-y radius=0.0699949 length=0.1428623
      WrapCylinder IL_at_brim_r: xyz_body_rotation=(-0.32 -0.24 0.9) translation=(-0.09922943 -0.09084384 0.1083439)
          quadrant=-y radius=0.07687585 length=0.1427854
      WrapCylinder IL_at_brim_l: xyz_body_rotation=(0.32 0.24 0.9) translation=(-0.09922943 -0.09084384 -0.1083439)
          quadrant=-y radius=0.07687585 length=0.1427854
    Body femur_r: mass=12.34639 mass_center=(0 -0.1695398 0) inertia=(0.1767737 0.04633874 0.1864111 0 0 0)
        meshes=r_femur.vtp
      WrapCylinder GasLat_at_condyles_r: translation=(0.004986464 -0.4088901 0) quadrant=all radius=0.02592961
          length=0.09972929
      WrapCylinder GasMed_at_condyles_r: translation=(0.004986464 -0.4088901 0) quadrant=all radius=0.02493232
          length=0.09972929
      WrapCylinder KnExt_at_fem_r: xyz_body_rotation=(-0.0623366 0.0507601 0)
          translation=(0.003578566 -0.4016418 0.002085449) quadrant=all radius=0.02493232 length=0.09972929
      WrapCylinder KnExtVL_at_fem_r: xyz_body_rotation=(-0.0623366 0.0507601 0)
          translation=(0.001883168 -0.4016418 0.002085449) quadrant=all radius=0.02493232 length=0.09972929
      WrapCylinder AB_at_femshaft_r: xyz_body_rotation=(1.66157 0.186644 0)
          translation=(0.01460376 -0.1122902 0.02330175) quadrant=all radius=0.01645533 length=0.0698105
      WrapCylinder AL_at_femshaft_r: xyz_body_rotation=(1.77711 0.136489 0)
          translation=(0.0306495 -0.2312812 0.01507279) quadrant=all radius=0.02004559 length=0.09972929
      WrapCylinder AMprox_at_femshaft_r: xyz_body_rotation=(1.61126 0.18656 0)
          translation=(0.005168959 -0.07269747 0.02533423) quadrant=all radius=0.02104288 length=0.0698105
      WrapCylinder AMmid_at_femshaft_r: xyz_body_rotation=(1.61139 0.13656 0)
          translation=(0.0229502 -0.1602759 0.02052848) quadrant=all radius=0.02134207 length=0.1196751
      WrapCylinder AMdist_at_femshaft_r: xyz_body_rotation=(1.71188 0.186636 0)
          translation=(0.03152094 -0.2600302 0.009339249) quadrant=all radius=0.02174098 length=0.1994586
      WrapCylinder AMisch_at_condyles_r: xyz_body_rotation=(1.71115 -0.463363 0)
          translation=(-0.02258978 -0.3758109 -0.003145831) quadrant=all radius=0.03989172 length=0.2393503
      WrapCylinder PECT_at_femshaft_r: xyz_body_rotation=(1.81295 0.276344 0)
          translation=(0.006069255 -0.08427414 0.03035809) quadrant=all radius=0.01495939 length=0.04986464
    Body tibia_r: mass=4.921221 mass_center=(0 -0.1814106 0) inertia=(0.06316241 0.006391434 0.06403966 0 0 0)
        meshes=(r_tibia.vtp r_fibula.vtp)
      WrapCylinder GasLat_at_shank_r: xyz_body_rotation=(2.96723 -0.279725 -1.47812)
          translation=(-0.007190349 -0.07190349 -0.003206507) quadrant=-y radius=0.05344178 length=0.09716688
      WrapCylinder GasMed_at_shank_r: xyz_body_rotation=(2.96723 0.0279725 -1.47812)
          translation=(-0.007190349 -0.07190349 -0.003206507) quadrant=-y radius=0.05732846 length=0.09716688
      WrapCylinder GR_at_condyles_r: xyz_body_rotation=(0 -0.4 0) translation=(-0.002915006 -0.01943338 0) quadrant=all
          radius=0.03498008 length=0.09716688
      WrapCylinder SM_at_condyles_r: xyz_body_rotation=(0 -0.1 0) translation=(-0.0009716688 -0.01943338 0)
          quadrant=all radius=0.03352257 length=0.09716688
      WrapCylinder ST_at_condyles_r: xyz_body_rotation=(0 -0.2 0) translation=(-0.001943338 -0.01991921 0) quadrant=all
          radius=0.04129592 length=0.09716688
      WrapCylinder BF_at_gastroc_r: translation=(-0.03789508 -0.05830013 0) quadrant=y radius=0.02817839
          length=0.1457503
    Body talus_r: mass=0.1327369 mass_center=(0 0 0) inertia=(0.001399052 0.001399052 0.001399052 0 0 0)
        meshes=r_talus.vtp
    Body calcn_r: mass=1.659211 mass_center=(0.1026647 0.0307994 0) inertia=(0.001958672 0.005456302 0.005736112 0 0 0)
        meshes=r_foot.vtp
    Body toes_r: mass=0.2875081 mass_center=(0.03552198 0.006159881 -0.01796632)
        inertia=(0.0001399052 0.0002798103 0.001399052 0 0 0) meshes=r_bofoot.vtp
    Body femur_l: mass=12.34639 mass_center=(0 -0.1642133 0) inertia=(0.1658408 0.04347282 0.1748821 0 0 0)
        meshes=l_femur.vtp
      WrapCylinder GasLat_at_condyles_l: translation=(0.004829804 -0.3960439 0) quadrant=all radius=0.02511498
          length=0.09659608
      WrapCylinder GasMed_at_condyles_l: translation=(0.004829804 -0.3960439 0) quadrant=all radius=0.02414902
          length=0.09659608
      WrapCylinder KnExt_at_fem_l: xyz_body_rotation=(0.0623366 -0.0507601 0)
          translation=(0.003466138 -0.3890233 -0.00201993) quadrant=all radius=0.02414902 length=0.09659608
      WrapCylinder KnExtVL_at_fem_l: xyz_body_rotation=(0.0623366 -0.0507601 0)
          translation=(0.001824004 -0.3890233 -0.00201993) quadrant=all radius=0.02414902 length=0.09659608
      WrapCylinder AB_at_femshaft_l: xyz_body_rotation=(-1.66157 -0.186644 0)
          translation=(0.01414495 -0.1087624 -0.02256967) quadrant=all radius=0.01593835 length=0.06761726
      WrapCylinder AL_at_femshaft_l: xyz_body_rotation=(-1.77711 -0.136489 0)
          translation=(0.02968658 -0.224015 -0.01459924) quadrant=all radius=0.01941581 length=0.09659608
      WrapCylinder AMprox_at_femshaft_l: xyz_body_rotation=(-1.61126 -0.18656 0)
          translation=(0.005006565 -0.07041352 -0.0245383) quadrant=all radius=0.02038177 length=0.06761726
      WrapCylinder AMmid_at_femshaft_l: xyz_body_rotation=(-1.61139 -0.13656 0)
          translation=(0.02222917 -0.1552405 -0.01988353) quadrant=all radius=0.02067156 length=0.1159153
      WrapCylinder AMdist_at_femshaft_l: xyz_body_rotation=(-1.71188 -0.186636 0)
          translation=(0.03053064 -0.2518608 -0.009045837) quadrant=all radius=0.02105795 length=0.1931922
      WrapCylinder AMisch_at_condyles_l: xyz_body_rotation=(-1.71115 0.463363 0)
          translation=(-0.02188008 -0.364004 0.003046998) quadrant=all radius=0.03863843 length=0.2318306
      WrapCylinder PECT_at_femshaft_l: xyz_body_rotation=(-1.81295 -0.276344 0)
          translation=(0.005878577 -0.08162649 -0.02940433) quadrant=all radius=0.01448941 length=0.04829804
    Body tibia_l: mass=4.921221 mass_center=(0 -0.1865409 0) inertia=(0.06678544 0.00675805 0.06771301 0 0 0)
        meshes=(l_tibia.vtp l_fibula.vtp)
      WrapCylinder GasLat_at_shank_l: xyz_body_rotation=(-2.96723 0.279725 -1.47812)
          translation=(-0.007393694 -0.07393694 0.003297188) quadrant=-y radius=0.05495313 length=0.09991479
      WrapCylinder GasMed_at_shank_l: xyz_body_rotation=(-2.96723 -0.0279725 -1.47812)
          translation=(-0.007393694 -0.07393694 0.003297188) quadrant=-y radius=0.05894973 length=0.09991479
      WrapCylinder GR_at_condyles_l: xyz_body_rotation=(0 0.4 0) translation=(-0.002997444 -0.01998296 0) quadrant=all
          radius=0.03596932 length=0.09991479
      WrapCylinder SM_at_condyles_l: xyz_body_rotation=(0 0.1 0) translation=(-0.0009991479 -0.01998296 0) quadrant=all
          radius=0.0344706 length=0.09991479
      WrapCylinder ST_at_condyles_l: xyz_body_rotation=(0 0.2 0) translation=(-0.001998296 -0.02048253 0) quadrant=all
          radius=0.04246379 length=0.09991479
      WrapCylinder BF_at_gastroc_l: translation=(-0.03896677 -0.05994887 0) quadrant=all radius=0.02897529
          length=0.1498722
    Body talus_l: mass=0.1327369 mass_center=(0 0 0) inertia=(0.001399052 0.001399052 0.001399052 0 0 0)
        meshes=l_talus.vtp
    Body calcn_l: mass=1.659211 mass_center=(0.1026647 0.0307994 0) inertia=(0.001958672 0.005456302 0.005736112 0 0 0)
        meshes=l_foot.vtp
    Body toes_l: mass=0.2875081 mass_center=(0.03552198 0.006159881 0.01796632)
        inertia=(0.0001399052 0.0002798103 0.001399052 0 0 0) meshes=l_bofoot.vtp
    Body torso: mass=35.6088 mass_center=(-0.03438606 0.3667846 0) inertia=(2.642067 1.458956 2.642067 0 0 0)
        meshes=(hat_spine.vtp hat_jaw.vtp hat_skull.vtp hat_ribs_scap.vtp)
    Body humerus_r: mass=2.697878 mass_center=(0 -0.1757143 0) inertia=(0.01809197 0.006241169 0.02030765 0 0 0)
        meshes=humerus_rv.vtp
    Body ulna_r: mass=0.8063767 mass_center=(0 -0.1314474 0) inertia=(0.004676556 0.0009757298 0.005072848 0 0 0)
        meshes=ulna_rv.vtp
    Body radius_r: mass=0.8063767 mass_center=(0 -0.1314474 0) inertia=(0.004676556 0.0009757298 0.005072848 0 0 0)
        meshes=radius_rv.vtp
    Body hand_r: mass=0.6072713 mass_center=(0 -0.07426598 0) inertia=(0.001408335 0.0008636314 0.00211566 0 0 0)
        meshes=(pisiform_rvs.vtp lunate_rvs.vtp scaphoid_rvs.vtp triquetrum_rvs.vtp hamate_rvs.vtp capitate_rvs.vtp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)
    Body humerus_l: mass=2.697878 mass_center=(0 -0.1757143 0) inertia=(0.01809197 0.006241169 0.02030765 0 0 0)
        meshes=humerus_lv.vtp
    Body ulna_l: mass=0.8063767 mass_center=(0 -0.1314474 0) inertia=(0.004676556 0.0009757298 0.005072848 0 0 0)
        meshes=ulna_lv.vtp
    Body radius_l: mass=0.8063767 mass_center=(0 -0.1314474 0) inertia=(0.004676556 0.0009757298 0.005072848 0 0 0)
        meshes=radius_lv.vtp
    Body hand_l: mass=0.6072713 mass_center=(0 -0.07426598 0) inertia=(0.001408335 0.0008636314 0.00211566 0 0 0)
        meshes=(pisiform_lvs.vtp lunate_lvs.vtp scaphoid_lvs.vtp triquetrum_lvs.vtp hamate_lvs.vtp capitate_lvs.vtp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)
  JointSet:
    CustomJoint ground_pelvis: socket_parent_frame=ground_offset socket_child_frame=pelvis_offset
      Coordinate pelvis_tilt: default_value=0 range=(-1.570796 1.570796) clamped=true
      Coordinate pelvis_list: default_value=0 range=(-1.570796 1.570796) clamped=true
      Coordinate pelvis_rotation: default_value=0 range=(-100 100) clamped=true
      Coordinate pelvis_tx: default_value=0 range=(-100 100) clamped=true
      Coordinate pelvis_ty: default_value=0.93 range=(-30 30) clamped=true
      Coordinate pelvis_tz: default_value=0 range=(-100 100) clamped=true
      PhysicalOffsetFrame ground_offset: socket_parent=/ground translation=(0 0 0) [meters]
      PhysicalOffsetFrame pelvis_offset: socket_parent=/bodyset/pelvis translation=(0 0 0)
      SpatialTransform:
        TransformAxis rotation1: coordinates=pelvis_tilt axis=(0 0 1) LinearFunction(coefficients=1 0)
        TransformAxis rotation2: coordinates=pelvis_list axis=(1 0 0) LinearFunction(coefficients=1 0)
        TransformAxis rotation3: coordinates=pelvis_rotation axis=(0 1 0) LinearFunction(coefficients=1 0)
        TransformAxis translation1: coordinates=pelvis_tx axis=(1 0 0) LinearFunction(coefficients=1 0)
        TransformAxis translation2: coordinates=pelvis_ty axis=(0 1 0) LinearFunction(coefficients=1 0)
        TransformAxis translation3: coordinates=pelvis_tz axis=(0 0 1) LinearFunction(coefficients=1 0)
    CustomJoint hip_r: socket_parent_frame=pelvis_offset socket_child_frame=femur_r_offset
      Coordinate hip_flexion_r: default_value=0 range=(-0.5235988 2.094395) clamped=true
      Coordinate hip_adduction_r: default_value=0 range=(-0.8726646 0.5235988) clamped=true
      Coordinate hip_rotation_r: default_value=0 range=(-0.6981317 0.6981317) clamped=true
      PhysicalOffsetFrame pelvis_offset: socket_parent=/bodyset/pelvis translation=(-0.0786512 -0.1096974 0.1107229)
      PhysicalOffsetFrame femur_r_offset: socket_parent=/bodyset/femur_r translation=(0 0 0)
      SpatialTransform: axes_held_at_zero=(translation1 translation2 translation3)
        TransformAxis rotation1: coordinates=hip_flexion_r axis=(0 0 1) LinearFunction(coefficients=1 0)
        TransformAxis rotation2: coordinates=hip_adduction_r axis=(1 0 0) LinearFunction(coefficients=1 0)
        TransformAxis rotation3: coordinates=hip_rotation_r axis=(0 1 0) LinearFunction(coefficients=1 0)
    CustomJoint walker_knee_r: socket_parent_frame=femur_r_offset socket_child_frame=tibia_r_offset
      Coordinate knee_angle_r: default_value=0 range=(0 2.443461) clamped=true
      PhysicalOffsetFrame femur_r_offset: socket_parent=/bodyset/femur_r
          translation=(-0.004487818 -0.4084912 -0.001745263) orientation=(-1.64157 1.44618 1.5708) [radians]
      PhysicalOffsetFrame tibia_r_offset: socket_parent=/bodyset/tibia_r
          translation=(-0.007860353 -0.003434655 -0.001442675) orientation=(-1.64157 1.44618 1.5708)
      SpatialTransform:
        TransformAxis rotation1: coordinates=knee_angle_r axis=(1 0 0) LinearFunction(coefficients=1 0)
        TransformAxis rotation2: coordinates=knee_angle_r axis=(0 0 1)
          PolynomialFunction: coefficients=(0.01083209 -0.02521833 -0.03284781 0.07910001 -1.473252e-8)
        TransformAxis rotation3: coordinates=knee_angle_r axis=(0 1 0)
          PolynomialFunction: coefficients=(0.02516576 -0.1694801 0.3694993 -4.430358e-8)
        TransformAxis translation1: coordinates=knee_angle_r axis=(1 0 0)
          MultiplierFunction: scale=0.9972929
            PolynomialFunction: coefficients=(0.0001590448 -0.00101515 0.001817511 2.641427e-5 -7.746564e-7)
        TransformAxis translation2: coordinates=knee_angle_r axis=(0 1 0)
          MultiplierFunction: scale=0.9972929
            PolynomialFunction: coefficients=(-0.0005796878 0.005079766 -0.01144238 0.003936909 -2.51635e-5)
        TransformAxis translation3: coordinates=knee_angle_r axis=(0 0 1)
          MultiplierFunction: scale=0.9972929
            PolynomialFunction: coefficients=(0.001208087 -0.004453611 0.0006116494 0.00626543 -1.461913e-5)
    PinJoint ankle_r: socket_parent_frame=tibia_r_offset socket_child_frame=talus_r_offset
      Coordinate ankle_angle_r: default_value=0 range=(-0.8726646 0.8726646) clamped=true
      PhysicalOffsetFrame tibia_r_offset: socket_parent=/bodyset/tibia_r translation=(-0.009716688 -0.3886675 0)
          orientation=(0.175895 -0.105208 0.0186622)
      PhysicalOffsetFrame talus_r_offset: socket_parent=/bodyset/talus_r translation=(0 0 0)
          orientation=(0.175895 -0.105208 0.0186622)
    PinJoint subtalar_r: socket_parent_frame=talus_r_offset socket_child_frame=calcn_r_offset
      Coordinate subtalar_angle_r: default_value=0 range=(-0.6108652 0.6108652) clamped=true
      PhysicalOffsetFrame talus_r_offset: socket_parent=/bodyset/talus_r
          translation=(-0.05006956 -0.04306783 0.008131042) orientation=(-1.76819 0.906223 1.8196)
      PhysicalOffsetFrame calcn_r_offset: socket_parent=/bodyset/calcn_r translation=(0 0 0)
          orientation=(-1.76819 0.906223 1.8196)
    PinJoint mtp_r: socket_parent_frame=calcn_r_offset socket_child_frame=toes_r_offset
      Coordinate mtp_angle_r: default_value=0 range=(-0.7853982 0.5235988) clamped=true
      PhysicalOffsetFrame calcn_r_offset: socket_parent=/bodyset/calcn_r
          translation=(0.1835644 -0.002053294 0.001108779) orientation=(-3.14159 0.619901 0)
      PhysicalOffsetFrame toes_r_offset: socket_parent=/bodyset/toes_r translation=(0 0 0)
          orientation=(-3.14159 0.619901 0)
    CustomJoint hip_l: socket_parent_frame=pelvis_offset socket_child_frame=femur_l_offset
      Coordinate hip_flexion_l: default_value=0 range=(-0.5235988 2.094395) clamped=true
      Coordinate hip_adduction_l: default_value=0 range=(-0.8726646 0.5235988) clamped=true
      Coordinate hip_rotation_l: default_value=0 range=(-0.6981317 0.6981317) clamped=true
      PhysicalOffsetFrame pelvis_offset: socket_parent=/bodyset/pelvis translation=(-0.0786512 -0.1096974 -0.1107229)
      PhysicalOffsetFrame femur_l_offset: socket_parent=/bodyset/femur_l translation=(0 0 0)
      SpatialTransform: axes_held_at_zero=(translation1 translation2 translation3)
        TransformAxis rotation1: coordinates=hip_flexion_l axis=(0 0 1) LinearFunction(coefficients=1 0)
        TransformAxis rotation2: coordinates=hip_adduction_l axis=(1 0 0) LinearFunction(coefficients=-1 0)
        TransformAxis rotation3: coordinates=hip_rotation_l axis=(0 1 0) LinearFunction(coefficients=-1 0)
    CustomJoint walker_knee_l: socket_parent_frame=femur_l_offset socket_child_frame=tibia_l_offset
      Coordinate knee_angle_l: default_value=0 range=(0 2.443461) clamped=true
      PhysicalOffsetFrame femur_l_offset: socket_parent=/bodyset/femur_l
          translation=(-0.004346824 -0.3956576 0.001690431) orientation=(1.64157 -1.44618 1.5708)
      PhysicalOffsetFrame tibia_l_offset: socket_parent=/bodyset/tibia_l
          translation=(-0.008082647 -0.003531788 0.001483475) orientation=(1.64157 -1.44618 1.5708)
      SpatialTransform:
        TransformAxis rotation1: coordinates=knee_angle_l axis=(-1 0 0) LinearFunction(coefficients=1 0)
        TransformAxis rotation2: coordinates=knee_angle_l axis=(0 0 1)
          PolynomialFunction: coefficients=(0.01083209 -0.02521833 -0.03284781 0.07910001 -1.473252e-8)
        TransformAxis rotation3: coordinates=knee_angle_l axis=(0 1 0)
          PolynomialFunction: coefficients=(-0.02516576 0.1694801 -0.3694993 4.430358e-8)
        TransformAxis translation1: coordinates=knee_angle_l axis=(1 0 0)
          MultiplierFunction: scale=0.9659608
            PolynomialFunction: coefficients=(0.0001590448 -0.00101515 0.001817511 2.641427e-5 -7.746564e-7)
        TransformAxis translation2: coordinates=knee_angle_l axis=(0 1 0)
          MultiplierFunction: scale=0.9659608
            PolynomialFunction: coefficients=(-0.0005796878 0.005079766 -0.01144238 0.003936909 -2.51635e-5)
        TransformAxis translation3: coordinates=knee_angle_l axis=(0 0 1)
          MultiplierFunction: scale=0.9659608
            PolynomialFunction: coefficients=(-0.001208087 0.004453611 -0.0006116494 -0.00626543 1.461913e-5)
    PinJoint ankle_l: socket_parent_frame=tibia_l_offset socket_child_frame=talus_l_offset
      Coordinate ankle_angle_l: default_value=0 range=(-0.8726646 0.8726646) clamped=true
      PhysicalOffsetFrame tibia_l_offset: socket_parent=/bodyset/tibia_l translation=(-0.009991479 -0.3996592 0)
          orientation=(-0.175895 0.105208 0.0186622)
      PhysicalOffsetFrame talus_l_offset: socket_parent=/bodyset/talus_l translation=(0 0 0)
          orientation=(-0.175895 0.105208 0.0186622)
    PinJoint subtalar_l: socket_parent_frame=talus_l_offset socket_child_frame=calcn_l_offset
      Coordinate subtalar_angle_l: default_value=0 range=(-0.6108652 0.6108652) clamped=true
      PhysicalOffsetFrame talus_l_offset: socket_parent=/bodyset/talus_l
          translation=(-0.05006956 -0.04306783 -0.008131042) orientation=(1.76819 -0.906223 1.8196)
      PhysicalOffsetFrame calcn_l_offset: socket_parent=/bodyset/calcn_l translation=(0 0 0)
          orientation=(1.76819 -0.906223 1.8196)
    PinJoint mtp_l: socket_parent_frame=calcn_l_offset socket_child_frame=toes_l_offset
      Coordinate mtp_angle_l: default_value=0 range=(-0.7853982 0.5235988) clamped=true
      PhysicalOffsetFrame calcn_l_offset: socket_parent=/bodyset/calcn_l
          translation=(0.1835644 -0.002053294 -0.001108779) orientation=(-3.14159 -0.619901 0)
      PhysicalOffsetFrame toes_l_offset: socket_parent=/bodyset/toes_l translation=(0 0 0)
          orientation=(-3.14159 -0.619901 0)
    CustomJoint back: socket_parent_frame=pelvis_offset socket_child_frame=torso_offset
      Coordinate lumbar_extension: default_value=0 range=(-1.570796 1.570796) clamped=true
      Coordinate lumbar_bending: default_value=0 range=(-1.570796 1.570796) clamped=true
      Coordinate lumbar_rotation: default_value=0 range=(-1.570796 1.570796) clamped=true
      PhysicalOffsetFrame pelvis_offset: socket_parent=/bodyset/pelvis translation=(-0.1407381 0.1139042 0)
      PhysicalOffsetFrame torso_offset: socket_parent=/bodyset/torso translation=(0 0 0)
      SpatialTransform: axes_held_at_zero=(translation1 translation2 translation3)
        TransformAxis rotation1: coordinates=lumbar_extension axis=(0 0 1) LinearFunction(coefficients=1 0)
        TransformAxis rotation2: coordinates=lumbar_bending axis=(1 0 0) LinearFunction(coefficients=1 0)
        TransformAxis rotation3: coordinates=lumbar_rotation axis=(0 1 0) LinearFunction(coefficients=1 0)
    CustomJoint acromial_r: socket_parent_frame=torso_offset socket_child_frame=humerus_r_offset
      Coordinate arm_flex_r: default_value=0 range=(-10 10) clamped=true
      Coordinate arm_add_r: default_value=0 range=(-10 10) clamped=true
      Coordinate arm_rot_r: default_value=0 range=(-10 10) clamped=true
      PhysicalOffsetFrame torso_offset: socket_parent=/bodyset/torso translation=(0.003616267 0.425814 0.2157764)
      PhysicalOffsetFrame humerus_r_offset: socket_parent=/bodyset/humerus_r translation=(0 0 0)
      SpatialTransform: axes_held_at_zero=(translation1 translation2 translation3)
        TransformAxis rotation1: coordinates=arm_flex_r axis=(0 0 1) LinearFunction(coefficients=1 0)
        TransformAxis rotation2: coordinates=arm_add_r axis=(1 0 0) LinearFunction(coefficients=1 0)
        TransformAxis rotation3: coordinates=arm_rot_r axis=(0 1 0) LinearFunction(coefficients=1 0)
    PinJoint elbow_r: socket_parent_frame=humerus_r_offset socket_child_frame=ulna_r_offset
      Coordinate elbow_flex_r: default_value=0 range=(0 2.618) clamped=true
      PhysicalOffsetFrame humerus_r_offset: socket_parent=/bodyset/humerus_r
          translation=(0.01403988 -0.305785 -0.01024898) orientation=(-0.0228627 0.228018 0.0051689)
      PhysicalOffsetFrame ulna_r_offset: socket_parent=/bodyset/ulna_r translation=(0 0 0)
          orientation=(-0.0228627 0.228018 0.0051689)
    PinJoint radioulnar_r: socket_parent_frame=ulna_r_offset socket_child_frame=radius_r_offset
      Coordinate pro_sup_r: default_value=0 range=(0 2.09) clamped=true
      PhysicalOffsetFrame ulna_r_offset: socket_parent=/bodyset/ulna_r
          translation=(-0.007336622 -0.01418574 0.02844672) orientation=(-1.56884 0.056428 1.53614)
      PhysicalOffsetFrame radius_r_offset: socket_parent=/bodyset/radius_r translation=(0 0 0)
          orientation=(-1.56884 0.056428 1.53614)
    WeldJoint radius_hand_r: socket_parent_frame=radius_r_offset socket_child_frame=hand_r_offset
      PhysicalOffsetFrame radius_r_offset: socket_parent=/bodyset/radius_r
          translation=(-0.009594212 -0.2572137 0.01484338) orientation=(-1.5708 0 -1.5708)
      PhysicalOffsetFrame hand_r_offset: socket_parent=/bodyset/hand_r translation=(0 0 0)
          orientation=(-1.5708 0 -1.5708)
    CustomJoint acromial_l: socket_parent_frame=torso_offset socket_child_frame=humerus_l_offset
      Coordinate arm_flex_l: default_value=0 range=(-10 10) clamped=true
      Coordinate arm_add_l: default_value=0 range=(-10 10) clamped=true
      Coordinate arm_rot_l: default_value=0 range=(-10 10) clamped=true
      PhysicalOffsetFrame torso_offset: socket_parent=/bodyset/torso translation=(0.003616267 0.425814 -0.2157764)
      PhysicalOffsetFrame humerus_l_offset: socket_parent=/bodyset/humerus_l translation=(0 0 0)
      SpatialTransform: axes_held_at_zero=(translation1 translation2 translation3)
        TransformAxis rotation1: coordinates=arm_flex_l axis=(0 0 1) LinearFunction(coefficients=1 0)
        TransformAxis rotation2: coordinates=arm_add_l axis=(-1 0 0) LinearFunction(coefficients=1 0)
        TransformAxis rotation3: coordinates=arm_rot_l axis=(0 -1 0) LinearFunction(coefficients=1 0)
    PinJoint elbow_l: socket_parent_frame=humerus_l_offset socket_child_frame=ulna_l_offset
      Coordinate elbow_flex_l: default_value=0 range=(0 2.618) clamped=true
      PhysicalOffsetFrame humerus_l_offset: socket_parent=/bodyset/humerus_l
          translation=(0.01403988 -0.305785 0.01024898) orientation=(0.0228627 -0.228018 0.0051689)
      PhysicalOffsetFrame ulna_l_offset: socket_parent=/bodyset/ulna_l translation=(0 0 0)
          orientation=(0.0228627 -0.228018 0.0051689)
    PinJoint radioulnar_l: socket_parent_frame=ulna_l_offset socket_child_frame=radius_l_offset
      Coordinate pro_sup_l: default_value=0 range=(0 2.09) clamped=true
      PhysicalOffsetFrame ulna_l_offset: socket_parent=/bodyset/ulna_l
          translation=(-0.007336622 -0.01418574 -0.02844672) orientation=(1.56884 -0.056428 1.53614)
      PhysicalOffsetFrame radius_l_offset: socket_parent=/bodyset/radius_l translation=(0 0 0)
          orientation=(1.56884 -0.056428 1.53614)
    WeldJoint radius_hand_l: socket_parent_frame=radius_l_offset socket_child_frame=hand_l_offset
      PhysicalOffsetFrame radius_l_offset: socket_parent=/bodyset/radius_l
          translation=(-0.009594212 -0.2572137 -0.01484338) orientation=(1.5708 0 1.5708)
      PhysicalOffsetFrame hand_l_offset: socket_parent=/bodyset/hand_l translation=(0 0 0)
          orientation=(1.5708 0 1.5708)
  ForceSet:
    ObjectGroup right_leg
    ObjectGroup left_leg
    ObjectGroup hip_add_r
    ObjectGroup hip_abd_r
    ObjectGroup hip_flex_r
    ObjectGroup hip_ext_r
    ObjectGroup hip_inrot_r
    ObjectGroup hip_exrot_r
    ObjectGroup knee_flex_r
    ObjectGroup knee_ext_r
    ObjectGroup ankle_df_r
    ObjectGroup ankle_pf_r
    ObjectGroup everter_r
    ObjectGroup inverter_r
    ObjectGroup hip_add_l
    ObjectGroup hip_abd_l
    ObjectGroup hip_flex_l
    ObjectGroup hip_ext_l
    ObjectGroup hip_exrot_l
    ObjectGroup hip_inrot_l
    ObjectGroup knee_flex_l
    ObjectGroup knee_ext_l
    ObjectGroup ankle_df_l
    ObjectGroup ankle_pf_l
    ObjectGroup everter_l
    ObjectGroup inverter_l
  MarkerSet:
    Marker r.ASIS_study: pelvis (0.03339881 0.01025114 0.185932)
    Marker L.ASIS_study: pelvis (0.05242293 0.003814468 -0.1801299)
    Marker r.PSIS_study: pelvis (-0.2155817 0.01117727 0.06411865)
    Marker L.PSIS_study: pelvis (-0.2068079 0.00724981 -0.08011137)
    Marker r_knee_study: femur_r (0.01427873 -0.3870872 0.09540957)
    Marker r_mknee_study: femur_r (0.03449583 -0.3788797 -0.0663343)
    Marker r_ankle_study: tibia_r (-0.0259778 -0.3557397 0.0577401)
    Marker r_mankle_study: tibia_r (0.007086971 -0.3458274 -0.0440552)
    Marker r_toe_study: calcn_r (0.179851 0.0336663 -0.003471447)
    Marker r_5meta_study: calcn_r (0.1374351 0.01695142 0.06321302)
    Marker r_calc_study: calcn_r (-0.03031228 0.06098754 -0.005710297)
    Marker L_knee_study: femur_l (0.03166642 -0.3829603 -0.07981404)
    Marker L_mknee_study: femur_l (0.03071761 -0.3805466 0.09236517)
    Marker L_ankle_study: tibia_l (-0.03761508 -0.3711771 -0.06540487)
    Marker L_mankle_study: tibia_l (0.001613789 -0.3704421 0.04677122)
    Marker L_toe_study: calcn_l (0.1885964 0.01308677 0.0002077683)
    Marker L_calc_study: calcn_l (-0.04775254 0.05669768 0.0009253184)
    Marker L_5meta_study: calcn_l (0.1346125 0.008312931 -0.07984329)
    Marker r_shoulder_study: torso (0.03215959 0.4347748 0.1824721)
    Marker L_shoulder_study: torso (-0.02279991 0.4438156 -0.1736723)
    Marker C7_study: torso (-0.1024089 0.4371856 0.008534876)
    Marker r_lelbow_study: humerus_r (0.01602238 -0.2990845 0.04272635) fixed=true
    Marker r_melbow_study: humerus_r (0.002403357 -0.3054934 -0.05340794) fixed=true
    Marker r_lwrist_study: radius_r (0.0005453116 -0.2453902 0.05453116) fixed=true
    Marker r_mwrist_study: radius_r (-0.02399371 -0.2453902 -0.02399371) fixed=true
    Marker L_lelbow_study: humerus_l (0.01602238 -0.2990845 -0.04272635) fixed=true
    Marker L_melbow_study: humerus_l (0.002403357 -0.3054934 0.05340794) fixed=true
    Marker L_lwrist_study: radius_l (0.0005453116 -0.2453902 -0.05453116) fixed=true
    Marker L_mwrist_study: radius_l (-0.02399371 -0.2453902 0.02399371) fixed=true
    Marker r_thigh1_study: femur_r (0.1130183 -0.1338644 0.1274388)
    Marker r_thigh2_study: femur_r (0.0666579 -0.2355325 0.1451575)
    Marker r_thigh3_study: femur_r (-0.04282567 -0.1365316 0.1444927)
    Marker L_thigh1_study: femur_l (0.1488055 -0.1337704 -0.1064733)
    Marker L_thigh2_study: femur_l (0.09984603 -0.2313997 -0.1286963)
    Marker L_thigh3_study: femur_l (-0.01630027 -0.1325714 -0.1551081)
    Marker r_sh1_study: tibia_r (-0.00469905 -0.09182395 0.08682912)
    Marker r_sh2_study: tibia_r (0.01801197 -0.205297 0.09353772)
    Marker r_sh3_study: tibia_r (-0.056195 -0.1938783 0.09352315)
    Marker L_sh1_study: tibia_l (0.0009953649 -0.1014698 -0.08634103)
    Marker L_sh2_study: tibia_l (0.02553751 -0.2189831 -0.1045016)
    Marker L_sh3_study: tibia_l (-0.06610437 -0.2045266 -0.09393028)
    Marker RHJC_study: pelvis (-0.08488836 -0.1031991 0.1062322)
    Marker LHJC_study: pelvis (-0.07381911 -0.1074505 -0.1148954)
